<?xml version="1.0"?>
<rocket_engine name="SRB">
  <isp>                   1600  </isp>
  <maxthrottle>           1.04  </maxthrottle>
  <minthrottle>           0.35  </minthrottle>
  <max_pc>		    86556.00  </max_pc>
  <slfuelflowmax unit="LBS/SEC">  1940.0  </slfuelflowmax>
  <sloxiflowmax unit="LBS/SEC">   324.0  </sloxiflowmax>
</rocket_engine>
