<?xml version="1.0"?>
<rocket_engine name="XLR-01">
  <isp>                    353  </isp>
  <maxthrottle>           1.00  </maxthrottle>
  <minthrottle>           0.00  </minthrottle>
  <max_pc>			12579  </max_pc>
  <slfuelflowmax unit="LBS/SEC"> 29.0  </slfuelflowmax>
  <sloxiflowmax unit="LBS/SEC">   5.0  </sloxiflowmax>
</rocket_engine>
